Wed Dec  1 18:06:50 CST 2021
;; 1. Based on: run58
;; 2. Description: 58 final
;; x1. Author: user
$PROBLEM    rabbit PK
$INPUT      ID OLDID=DROP TIME TAD TIMED=DROP NGML DV AMT DOSE DOSEVOL
            EVID MDV II ADDL STUDY INFECTION METAB WT BLQ CMTX REGION
            SAMPLEID TISSUEWT LOC CODOSE POOLED METHOD NDOSES
            SURFACEAREA BIOPSY L2 STUDYSITE CHECKED=DROP
$DATA      BDQ_all_data_nm_v2.csv IGNORE=C IGNORE(CMTX.EQ.4)

;IGNORE(METAB.EQ.1)

;IGNORE(INFECTION.EQ.0)
$SUBROUTINE ADVAN6 TOL=5
$MODEL      NCOMP=5 COMP=(ABS,DEFDOSE) COMP=(CENTRAL) COMP=(PERIPH)
            COMP=(METAB) COMP=(TRANSIT1)
$PK

IF(L2.EQ.1) CMT = 2
IF(L2.EQ.2) CMT = 4

INFECTCOVCL = THETA(9)

CL = THETA(3)
V  = THETA(4) * EXP(ETA(2))
KE = CL/V
KA = THETA(5)
S2 = V

DOSECOVF1 = THETA(8)

F1 = 1 * EXP(ETA(1))

Q = THETA(6)
V2 = THETA(7)

CLM = THETA(11)

VM = V

KM = CLM/VM

$DES
DADT(1)=-KA*A(1)
DADT(2)= KA*A(5)-KE*A(2)-Q/V*A(2)+Q/V2*A(3)
DADT(3)= Q/V*A(2)-Q/V2*A(3)
DADT(4)= KE*A(2)-CLM*A(4)/VM
DADT(5)= KA*A(1)-KA*A(5)

$ERROR

; Uppsala parent-metabolite error model
IPRED = 0
IF(A(2).GT.0.AND.CMT.EQ.2) IPRED=A(2)/V
IF(A(4).GT.0.AND.CMT.EQ.4) IPRED=A(4)/VM

W = 1
IF(IPRED.GT.0.AND.CMT.EQ.2) W = THETA(1) ; residual error for parent only
IF(IPRED.GT.0.AND.CMT.EQ.4) W = THETA(2) ; residual error for metabolite only
W2 = THETA(10) ; common residual error to account for correlation

IRES=DV-IPRED
IWRES=IRES/W

IF(CMT.EQ.2) Y = IPRED+W*EPS(1) + W2*EPS(3) ;parent
IF(CMT.EQ.4) Y = IPRED+W*EPS(2) + W2*EPS(3) ;metabolite

$THETA  (0,0.276) ; 1 Parent Error
 (0,0.0388) ; 2 Metabolite Error
 (0,11.2) ; 3 CL L/h
 (0,257) ; 4 V L
 (0,0.411) ; 5 KA 1/h
 (0,26) ; 6 Q
 (0,301) ; 7 V2
 0 FIX ; 8 DOSECOVF1
 1 FIX ; 9 INFECTCOVCL
 0 FIX ; 10 W2
 (0,27.2) ; 11 CLM
$OMEGA  0.101  ;     IIV F1
 0.327  ;     IIV V2
$SIGMA  1  FIX
 1  FIX
 1  FIX
$ESTIMATION METHOD=1 INTERACTION PRINT=5 SIG=3 MAXEVAL=9999 NOABORT
$COVARIANCE UNCONDITIONAL
$TABLE      ID TIME TAD IPRED PRED DV AMT DOSE WRES IWRES CWRES EVID
            NDOSES INFECTION WT METAB CL V KA KE F1 KM DOSECOVF1
            INFECTCOVCL CMT FILE=sdtab59 NOPRINT ONEHEADER
$TABLE      ID CL V KA KE FILE=patab59 NOPRINT ONEHEADER

NM-TRAN MESSAGES
 WARNINGS AND ERRORS (IF ANY) FOR PROBLEM    1
 (WARNING  2) NM-TRAN INFERS THAT THE DATA ARE POPULATION.
 (WARNING  3) THERE MAY BE AN ERROR IN THE ABBREVIATED CODE. THE FOLLOWING
 ONE OR MORE RANDOM VARIABLES ARE DEFINED WITH "IF" STATEMENTS THAT DO NOT
 PROVIDE DEFINITIONS FOR BOTH THE "THEN" AND "ELSE" CASES. IF ALL
 CONDITIONS FAIL, THE VALUES OF THESE VARIABLES WILL BE ZERO.
   Y

1NONLINEAR MIXED EFFECTS MODEL PROGRAM (NONMEM) VERSION 7.4.2
 ORIGINALLY DEVELOPED BY STUART BEAL, LEWIS SHEINER, AND ALISON BOECKMANN
 CURRENT DEVELOPERS ARE ROBERT BAUER, ICON DEVELOPMENT SOLUTIONS,
 AND ALISON BOECKMANN. IMPLEMENTATION, EFFICIENCY, AND STANDARDIZATION
 PERFORMED BY NOUS INFOSYSTEMS.
 PROBLEM NO.:         1
 rabbit PK
 TOT. NO. OF OBS RECS:      464
 TOT. NO. OF INDIVIDUALS:       55
 GENERAL NONLINEAR KINETICS MODEL (DVERK1, ADVAN6)
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 #TBLN:      1
 #METH: First Order Conditional Estimation with Interaction
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
 #TERM:
0MINIMIZATION SUCCESSFUL
 NO. OF FUNCTION EVALUATIONS USED:      349
 NO. OF SIG. DIGITS IN FINAL EST.:  3.3

 ETABAR IS THE ARITHMETIC MEAN OF THE ETA-ESTIMATES,
 AND THE P-VALUE IS GIVEN FOR THE NULL HYPOTHESIS THAT THE TRUE MEAN IS 0.

 ETABAR:         1.7762E-02  1.2286E-02
 SE:             2.8432E-02  4.4125E-02
 N:                      55          55

 P VAL.:         5.3217E-01  7.8068E-01

 ETASHRINKSD(%)  3.3105E+01  4.2239E+01
 ETASHRINKVR(%)  5.5251E+01  6.6637E+01
 EBVSHRINKSD(%)  3.3554E+01  4.4867E+01
 EBVSHRINKVR(%)  5.5849E+01  6.9603E+01
 EPSSHRINKSD(%)  3.0653E+00  1.0070E+01  1.0000E+02
 EPSSHRINKVR(%)  6.0367E+00  1.9126E+01  1.0000E+02


 TOTAL DATA POINTS NORMALLY DISTRIBUTED (N):          464
 N*LOG(2PI) CONSTANT TO OBJECTIVE FUNCTION:    852.77495881393622
 OBJECTIVE FUNCTION VALUE WITHOUT CONSTANT:   -1470.9386194924571
 OBJECTIVE FUNCTION VALUE WITH CONSTANT:      -618.16366067852084
 REPORTED OBJECTIVE FUNCTION DOES NOT CONTAIN CONSTANT

 TOTAL EFFECTIVE ETAS (NIND*NETA):                           110


 #TERE:
 Elapsed estimation  time in seconds:    41.15
 Elapsed covariance  time in seconds:    38.94
 Elapsed postprocess time in seconds:     0.37

 ********************               FIRST ORDER CONDITIONAL ESTIMATION WITH INTERACTION              ********************
 #OBJT:**************                       MINIMUM VALUE OF OBJECTIVE FUNCTION                      ********************
 #OBJV:********************************************    -1470.939       **************************************************

 ********************               FIRST ORDER CONDITIONAL ESTIMATION WITH INTERACTION              ********************
 ********************                             FINAL PARAMETER ESTIMATE                           ********************

 THETA - VECTOR OF FIXED EFFECTS PARAMETERS   *********
         TH 1      TH 2      TH 3      TH 4      TH 5      TH 6      TH 7      TH 8      TH 9      TH10      TH11
         2.76E-01  3.88E-02  1.12E+01  2.57E+02  4.11E-01  2.60E+01  3.01E+02  0.00E+00  1.00E+00  0.00E+00  2.72E+01

 OMEGA - COV MATRIX FOR RANDOM EFFECTS - ETAS  ********
         ETA1      ETA2
 ETA1
+        1.01E-01
 ETA2
+        0.00E+00  3.27E-01

 SIGMA - COV MATRIX FOR RANDOM EFFECTS - EPSILONS  ****
         EPS1      EPS2      EPS3
 EPS1
+        1.00E+00
 EPS2
+        0.00E+00  1.00E+00
 EPS3
+        0.00E+00  0.00E+00  1.00E+00

 OMEGA - CORR MATRIX FOR RANDOM EFFECTS - ETAS  *******
         ETA1      ETA2
 ETA1
+        3.18E-01
 ETA2
+        0.00E+00  5.72E-01

 SIGMA - CORR MATRIX FOR RANDOM EFFECTS - EPSILONS  ***
         EPS1      EPS2      EPS3
 EPS1
+        1.00E+00
 EPS2
+        0.00E+00  1.00E+00
 EPS3
+        0.00E+00  0.00E+00  1.00E+00

 ********************               FIRST ORDER CONDITIONAL ESTIMATION WITH INTERACTION              ********************
 ********************                            STANDARD ERROR OF ESTIMATE                          ********************

 THETA - VECTOR OF FIXED EFFECTS PARAMETERS   *********
         TH 1      TH 2      TH 3      TH 4      TH 5      TH 6      TH 7      TH 8      TH 9      TH10      TH11
         2.14E-02  6.12E-03  1.10E+00  5.29E+01  7.20E-02  1.62E+01  1.03E+02 ......... ......... .........  2.88E+00

 OMEGA - COV MATRIX FOR RANDOM EFFECTS - ETAS  ********
         ETA1      ETA2
 ETA1
+        5.10E-02
 ETA2
+       .........  1.05E-01

 SIGMA - COV MATRIX FOR RANDOM EFFECTS - EPSILONS  ****
         EPS1      EPS2      EPS3
 EPS1
+       .........
 EPS2
+       ......... .........
 EPS3
+       ......... ......... .........

 OMEGA - CORR MATRIX FOR RANDOM EFFECTS - ETAS  *******
         ETA1      ETA2
 ETA1
+        8.01E-02
 ETA2
+       .........  9.15E-02

 SIGMA - CORR MATRIX FOR RANDOM EFFECTS - EPSILONS  ***
         EPS1      EPS2      EPS3
 EPS1
+       .........
 EPS2
+       ......... .........
 EPS3
+       ......... ......... .........
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 Elapsed finaloutput time in seconds:     0.05
 #CPUT: Total CPU Time in Seconds,       80.225
