Mon May  6 22:45:38 PDT 2024
;; 1. Based on: 16
$PROBLEM    rabbit PK gradient in caseum,BDQ
$INPUT      C ID LESION RABBITID OLDID=DROP TIME TAD TIMED DIST NGML
            NDV AMT DOSE FLAT_DOSE nDOSES EVID MDV II ADDL METABFL BLQ
            CMTFL CMTDONUT TISSUE SPECIES SURF_AREA_UM2 AREA SLICE_NO
            DIST_250GRP DIST_SEQGRP INFECTION WT iCL iV iKA iKE iQ iV2
            iF1 iCLM iVM iPC6 iKPL6 DV
$DATA      1_NMdata_BQDGradient_20220324_IDperDV.csv IGNORE=C
            IGNORE(DIST.GT.1500) IGNORE(BLQ.EQ.1)

;IGNORE(METABFL.EQ.1)
$SUBROUTINE ADVAN6 TOL=2
$MODEL      NCOMP=7 COMP=(ABS,DEFDOSE) COMP=(CENTRAL,DEFOBS)
            COMP=(PERIPH) COMP=(METAB) COMP=(TRANSIT1)
            COMP=(CASEUMPARENT) COMP=(CASEUMMETAB)
$PK

;IF(METABFL.EQ.0) L2 = 1
;IF(METABFL.EQ.1) L2 = 2

CL = 11.2
V  = 257*EXP(ETA(2))
KE = CL/V
KA = 0.411
S2 = V

F1 = 1*EXP(ETA(1))

Q = 26
V2 = 301

CLM = 27.2
VM = V
KM = CLM/VM

IF(DIST.LE.10) THEN
DISTN = 10
ELSE
DISTN = DIST
ENDIF

DISTCOV = THETA(3)
DISTCOVGAMMA = THETA(7)
TVKPL6 = THETA(1)
KPL6 = TVKPL6
;IF(DIST.LE.150) TVPC6 = DISTCOV
TVPC6 = EXP(THETA(2))/DISTN**DISTCOVGAMMA
PC6 = TVPC6

DISTCOVMETAB = THETA(6)
DISTCOVMETABGAMMA = THETA(8)
TVKPL7 = THETA(4)
KPL7 = TVKPL7
;TVPC7 = PC_CELL_MED*(1+DISTCOVMETAB*DISTN/100)
;IF(DIST.LE.150) TVPC7 = DISTCOVMETAB
TVPC7 = EXP(THETA(5))/DISTN**DISTCOVMETABGAMMA
PC7 = TVPC7

$DES
DADT(1)=-KA*A(1)
DADT(2)= KA*A(5)-KE*A(2)-Q/V*A(2)+Q/V2*A(3)
DADT(3)= Q/V*A(2)-Q/V2*A(3)
DADT(4)= KE*A(2)-CLM*A(4)/VM
DADT(5)= KA*A(1)-KA*A(5)
DADT(6)= KPL6 * (PC6*A(2)/V - A(6))
DADT(7)= KPL7 * (PC7*A(4)/VM - A(7))

$ERROR

CP = A(2)/V
CM = A(4)/VM

DEL = 1E-12
IPRED = LOG(A(6)+DEL)
IF(METABFL.EQ.1) IPRED = LOG(A(7)+DEL)

W = SQRT((THETA(9)/EXP(IPRED))**2 + THETA(10)**2)
IF(METABFL.EQ.1) W = SQRT((THETA(11)/EXP(IPRED))**2 + THETA(12)**2)
IF(W.EQ.0) W = 1

IRES = DV-IPRED
IWRES = IRES/W

;Y = IPRED + W*EPS(1) + EPS(2)
;IF(L2.EQ.2) Y = IPRED + W*EPS(3) + EPS(4)

LLOQ=LOG(1/1000)
IF(METABFL.EQ.1) LLOQ=LOG(10/1000)
DUM  = (LLOQ-IPRED)/W
CUMD = PHI(DUM)
IF (BLQ.EQ.0) THEN
  F_FLAG = 0
  Y = IPRED + W*ERR(1)
ENDIF

IF(BLQ.EQ.1) THEN
  F_FLAG = 1
  Y = CUMD
ENDIF

$THETA  (0,0.00320542) ; 1 KPL7
 (0,5.08718) ; 2 PC7
 (0,462.129) FIX ; 3 DISTCOV
 (0,0.00350731) ; 4 KPL8
 (0,7.04629) ; 5 PC8
 (0,308.283) FIX ; 6 DISTCOV
 (0,0.681802) ; 7 DISTCOVGAMMA
 (0,0.753408) ; 8 DISTCOVMETABGAMMA
 (0,0.0252316) ; 9 prop Error
 (0,1.5107) ; 10 add Error
 (0,0.0572238) ; 11 metab prop Error
 (0,1.17652) ; 12 metab add Error
$OMEGA  0.10099684  FIX
 0.32695524  FIX
$SIGMA  1  FIX  ;    1 error
 1  FIX  ;    2 error
$ESTIMATION METHOD=1 INTERACTION LAPLACIAN NUMERICAL PRINT=1 SIGL=6
            NSIG=1 MAXEVAL=9999 NOABORT
$COVARIANCE UNCONDITIONAL
$TABLE      ID RABBITID LESION TIME TAD IPRED PRED DV METABFL AMT DIST
            WRES IWRES CWRES EVID F1 CL V KPL6 PC6 KPL7 PC7 WT
            FILE=sdtabD01 NOPRINT ONEHEADER

NM-TRAN MESSAGES
 WARNINGS AND ERRORS (IF ANY) FOR PROBLEM    1
 (WARNING  2) NM-TRAN INFERS THAT THE DATA ARE POPULATION.
 (WARNING  3) THERE MAY BE AN ERROR IN THE ABBREVIATED CODE. THE FOLLOWING
 ONE OR MORE RANDOM VARIABLES ARE DEFINED WITH "IF" STATEMENTS THAT DO NOT
 PROVIDE DEFINITIONS FOR BOTH THE "THEN" AND "ELSE" CASES. IF ALL
 CONDITIONS FAIL, THE VALUES OF THESE VARIABLES WILL BE ZERO.
   Y
 (WARNING  90) WITH "NUMERICAL", "SLOW" IS ALSO REQUIRED ON $ESTIM RECORD.
 NM-TRAN HAS SUPPLIED THIS OPTION.

1NONLINEAR MIXED EFFECTS MODEL PROGRAM (NONMEM) VERSION 7.5.0
 ORIGINALLY DEVELOPED BY STUART BEAL, LEWIS SHEINER, AND ALISON BOECKMANN
 CURRENT DEVELOPERS ARE ROBERT BAUER, ICON DEVELOPMENT SOLUTIONS,
 AND ALISON BOECKMANN. IMPLEMENTATION, EFFICIENCY, AND STANDARDIZATION
 PERFORMED BY NOUS INFOSYSTEMS.
 PROBLEM NO.:         1
 rabbit PK gradient in caseum,BDQ
 TOT. NO. OF OBS RECS:      109
 TOT. NO. OF INDIVIDUALS:       68
 GENERAL NONLINEAR KINETICS MODEL (DVERK1, ADVAN6)
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 #TBLN:      1
 #METH: Laplacian Conditional Estimation with Interaction
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
 #TERM:
0MINIMIZATION SUCCESSFUL
 NO. OF FUNCTION EVALUATIONS USED:      253
 NO. OF SIG. DIGITS IN FINAL EST.:  1.9

 ETABAR IS THE ARITHMETIC MEAN OF THE ETA-ESTIMATES,
 AND THE P-VALUE IS GIVEN FOR THE NULL HYPOTHESIS THAT THE TRUE MEAN IS 0.

 ETABAR:        -4.1431E-03  8.6949E-03
 SE:             1.8028E-02  1.7837E-02
 N:                      60          60

 P VAL.:         8.1824E-01  6.2594E-01

 ETASHRINKSD(%)  5.5687E+01  7.5632E+01
 ETASHRINKVR(%)  8.0364E+01  9.4062E+01
 EBVSHRINKSD(%)  6.7642E+01  8.7116E+01
 EBVSHRINKVR(%)  8.9530E+01  9.8340E+01
 RELATIVEINF(%)  1.0000E-10  1.0000E-10
 EPSSHRINKSD(%)  2.8433E+00  1.0000E+02
 EPSSHRINKVR(%)  5.6058E+00  1.0000E+02


 TOTAL DATA POINTS NORMALLY DISTRIBUTED (N):          109
 N*LOG(2PI) CONSTANT TO OBJECTIVE FUNCTION:    200.32860023861863
 OBJECTIVE FUNCTION VALUE WITHOUT CONSTANT:    174.48090462375887
 OBJECTIVE FUNCTION VALUE WITH CONSTANT:       374.80950486237748
 REPORTED OBJECTIVE FUNCTION DOES NOT CONTAIN CONSTANT

 TOTAL EFFECTIVE ETAS (NIND*NETA):                           120


 #TERE:
 Elapsed estimation  time in seconds:    36.69
 Elapsed covariance  time in seconds:    32.20
 Elapsed postprocess time in seconds:     0.18

 ********************                LAPLACIAN CONDITIONAL ESTIMATION WITH INTERACTION               ********************
 #OBJT:**************                       MINIMUM VALUE OF OBJECTIVE FUNCTION                      ********************
 #OBJV:********************************************      174.481       **************************************************

 ********************                LAPLACIAN CONDITIONAL ESTIMATION WITH INTERACTION               ********************
 ********************                             FINAL PARAMETER ESTIMATE                           ********************

 THETA - VECTOR OF FIXED EFFECTS PARAMETERS   *********
         TH 1      TH 2      TH 3      TH 4      TH 5      TH 6      TH 7      TH 8      TH 9      TH10      TH11      TH12
         1.62E-03  8.01E+00  4.62E+02  3.19E-03  9.39E+00  3.08E+02  1.09E+00  1.12E+00  2.24E-02  1.31E+00  5.28E-02  1.08E+00

 OMEGA - COV MATRIX FOR RANDOM EFFECTS - ETAS  ********
         ETA1      ETA2
 ETA1
+        1.01E-01
 ETA2
+        0.00E+00  3.27E-01

 SIGMA - COV MATRIX FOR RANDOM EFFECTS - EPSILONS  ****
         EPS1      EPS2
 EPS1
+        1.00E+00
 EPS2
+        0.00E+00  1.00E+00

 OMEGA - CORR MATRIX FOR RANDOM EFFECTS - ETAS  *******
         ETA1      ETA2
 ETA1
+        3.18E-01
 ETA2
+        0.00E+00  5.72E-01

 SIGMA - CORR MATRIX FOR RANDOM EFFECTS - EPSILONS  ***
         EPS1      EPS2
 EPS1
+        1.00E+00
 EPS2
+        0.00E+00  1.00E+00

 ********************                LAPLACIAN CONDITIONAL ESTIMATION WITH INTERACTION               ********************
 ********************                            STANDARD ERROR OF ESTIMATE                          ********************

 THETA - VECTOR OF FIXED EFFECTS PARAMETERS   *********
         TH 1      TH 2      TH 3      TH 4      TH 5      TH 6      TH 7      TH 8      TH 9      TH10      TH11      TH12
         2.40E-03  1.76E+00 .........  2.50E-03  1.02E+00 .........  1.36E-01  1.12E-01  6.87E-03  1.67E-01  1.29E-02  1.71E-01

 OMEGA - COV MATRIX FOR RANDOM EFFECTS - ETAS  ********
         ETA1      ETA2
 ETA1
+       .........
 ETA2
+       ......... .........

 SIGMA - COV MATRIX FOR RANDOM EFFECTS - EPSILONS  ****
         EPS1      EPS2
 EPS1
+       .........
 EPS2
+       ......... .........

 OMEGA - CORR MATRIX FOR RANDOM EFFECTS - ETAS  *******
         ETA1      ETA2
 ETA1
+       .........
 ETA2
+       ......... .........

 SIGMA - CORR MATRIX FOR RANDOM EFFECTS - EPSILONS  ***
         EPS1      EPS2
 EPS1
+       .........
 EPS2
+       ......... .........
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 Elapsed finaloutput time in seconds:     0.01
 #CPUT: Total CPU Time in Seconds,       69.245
