Wed Dec 22 11:26:36 PST 2021
;; 1. Based on: run60
;; 2. Description: 59 + add back metab periph
;; x1. Author: user
$PROBLEM    rabbit PK
$INPUT      ID OLDID=DROP DOSEX DOSEFLAT NDOSES TIME TAD NGML DV EVID
            MDV AMT II ADDL LESION METAB INFECT WT METHOD BIOPSY CMTX
            TUBENO LSIZE TISSUEWT DILUTION PBS DIST INRANK BLQ
$DATA      TBAJ587_plasma_lesion_data_nm_longterm_rabbit_only.csv
            IGNORE=@ IGNORE(LESION.GE.0)

;IGNORE(METAB.EQ.1)

;IGNORE(TIME.EQ.144)
$SUBROUTINE ADVAN6 TOL=5
$MODEL      NCOMP=6 COMP=(ABS,DEFDOSE) COMP=(CENTRAL,DEFOBS)
            COMP=(PERIPH) COMP=(TRANSIT) COMP=(METAB)
            COMP=(METABPERIPH)
$PK

IF(METAB.EQ.0) L2 = 1
IF(METAB.EQ.1) L2 = 2

IF(L2.EQ.1) CMT = 2
IF(L2.EQ.2) CMT = 5

CL = THETA(3)
KM = THETA(6)

V  = THETA(4) * EXP(ETA(2))

KA = THETA(5)
S2 = V
F1 = 1 * EXP(ETA(3))

ALAG1 = THETA(7)

Q = THETA(8)
V2 = THETA(9)

CLM = THETA(10)
VM = THETA(11)

QM = THETA(12)
VM2 = THETA(13)

$DES
DADT(1)=-KA*A(1)
DADT(2)= KA*A(4)- CL/V*A(2) - Q/V*A(2) + Q/V2*A(3)
DADT(3)= Q/V*A(2) - Q/V2*A(3)
DADT(4)= KA*A(1)-KA*A(4)

DADT(5)= CL/V*A(2)-CLM/VM*A(5) - QM/VM*A(5) + QM/VM2*A(6)
DADT(6)= QM/VM*A(5) - QM/VM2*A(6)

$ERROR

CP = A(2)/V
CM = A(5)/VM

IPRED = A(2)/V
IF(METAB.EQ.1) IPRED = A(5)/VM

IF(METAB.EQ.0) W = IPRED
IF(METAB.EQ.1) W = IPRED

IF(W.EQ.0) W = 1
IRES = DV-IPRED
IWRES = IRES/W

Y = IPRED + W*EPS(1)
IF(METAB.EQ.1) Y = IPRED + W*EPS(2)

$THETA  0 FIX ; 1 Parent Error
 0 FIX ; 2 Metab Error
 (0,5.54) ; 3 CL L/h
 (0,50.3) ; 4 V L
 (0,0.238) ; 5 KA 1/h
 0 FIX ; 6 KM
 0 FIX ; 7 ALAG1
 (0,27) ; 8 Q
 (0,386) ; 9 V2
 (0,12.3) ; 10 CLM
 (0,70.5) ; 11 VM
 (0,25) ; 12 QM
 (0,250) ; 13 VM2
$OMEGA  0  FIX  ; 1 Additive Error
 0  FIX  ;    2 IIV V
 0.402  ;   3 IIV F1
$SIGMA  0.256  ; 1 Parent prop error
 0.176  ; 2 Metab prop error
$ESTIMATION METHOD=1 INTERACTION PRINT=5 SIG=3 MAXEVAL=9999 NOABORT
$COVARIANCE UNCONDITIONAL
$TABLE      ID TIME TAD IPRED PRED DV AMT DOSEX WRES IWRES CWRES EVID
            F1 CL V INFECT WT METAB FILE=sdtab61 NOPRINT ONEHEADER
$TABLE      ID CL V KA Q V2 WT ETA(2) FILE=patab61 NOPRINT ONEHEADER

NM-TRAN MESSAGES
 WARNINGS AND ERRORS (IF ANY) FOR PROBLEM    1
 (WARNING  2) NM-TRAN INFERS THAT THE DATA ARE POPULATION.
 (WARNING  3) THERE MAY BE AN ERROR IN THE ABBREVIATED CODE. THE FOLLOWING
 ONE OR MORE RANDOM VARIABLES ARE DEFINED WITH "IF" STATEMENTS THAT DO NOT
 PROVIDE DEFINITIONS FOR BOTH THE "THEN" AND "ELSE" CASES. IF ALL
 CONDITIONS FAIL, THE VALUES OF THESE VARIABLES WILL BE ZERO.
   W

1NONLINEAR MIXED EFFECTS MODEL PROGRAM (NONMEM) VERSION 7.4.2
 ORIGINALLY DEVELOPED BY STUART BEAL, LEWIS SHEINER, AND ALISON BOECKMANN
 CURRENT DEVELOPERS ARE ROBERT BAUER, ICON DEVELOPMENT SOLUTIONS,
 AND ALISON BOECKMANN. IMPLEMENTATION, EFFICIENCY, AND STANDARDIZATION
 PERFORMED BY NOUS INFOSYSTEMS.
 PROBLEM NO.:         1
 rabbit PK
 TOT. NO. OF OBS RECS:      554
 TOT. NO. OF INDIVIDUALS:       35
 GENERAL NONLINEAR KINETICS MODEL (DVERK1, ADVAN6)
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 #TBLN:      1
 #METH: First Order Conditional Estimation with Interaction
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
 #TERM:
0MINIMIZATION SUCCESSFUL
 NO. OF FUNCTION EVALUATIONS USED:      494
 NO. OF SIG. DIGITS IN FINAL EST.:  3.5

 ETABAR IS THE ARITHMETIC MEAN OF THE ETA-ESTIMATES,
 AND THE P-VALUE IS GIVEN FOR THE NULL HYPOTHESIS THAT THE TRUE MEAN IS 0.

 ETABAR:         0.0000E+00  0.0000E+00  8.4479E-06
 SE:             0.0000E+00  0.0000E+00  1.0644E-01
 N:                      35          35          35

 P VAL.:         1.0000E+00  1.0000E+00  9.9994E-01

 ETASHRINKSD(%)  1.0000E+02  1.0000E+02  1.0000E-10
 ETASHRINKVR(%)  1.0000E+02  1.0000E+02  1.0000E-10
 EBVSHRINKSD(%)  0.0000E+00  0.0000E+00  1.1353E+00
 EBVSHRINKVR(%)  0.0000E+00  0.0000E+00  2.2578E+00
 EPSSHRINKSD(%)  1.8366E+00  2.7631E+00
 EPSSHRINKVR(%)  3.6396E+00  5.4499E+00


 TOTAL DATA POINTS NORMALLY DISTRIBUTED (N):          554
 N*LOG(2PI) CONSTANT TO OBJECTIVE FUNCTION:    1018.1838947907773
 OBJECTIVE FUNCTION VALUE WITHOUT CONSTANT:   -2230.1331626546566
 OBJECTIVE FUNCTION VALUE WITH CONSTANT:      -1211.9492678638794
 REPORTED OBJECTIVE FUNCTION DOES NOT CONTAIN CONSTANT

 TOTAL EFFECTIVE ETAS (NIND*NETA):                            35


 #TERE:
 Elapsed estimation  time in seconds:    26.74
 Elapsed covariance  time in seconds:    48.21
 Elapsed postprocess time in seconds:     0.21

 ********************               FIRST ORDER CONDITIONAL ESTIMATION WITH INTERACTION              ********************
 #OBJT:**************                       MINIMUM VALUE OF OBJECTIVE FUNCTION                      ********************
 #OBJV:********************************************    -2230.133       **************************************************

 ********************               FIRST ORDER CONDITIONAL ESTIMATION WITH INTERACTION              ********************
 ********************                             FINAL PARAMETER ESTIMATE                           ********************

 THETA - VECTOR OF FIXED EFFECTS PARAMETERS   *********
         TH 1      TH 2      TH 3      TH 4      TH 5      TH 6      TH 7      TH 8      TH 9      TH10      TH11      TH12
          TH13
         0.00E+00  0.00E+00  7.12E+00  8.94E+01  2.83E-01  0.00E+00  0.00E+00  1.35E+01  1.82E+02  1.28E+01  3.89E+01  4.13E+01
          3.53E+02

 OMEGA - COV MATRIX FOR RANDOM EFFECTS - ETAS  ********
         ETA1      ETA2      ETA3
 ETA1
+        0.00E+00
 ETA2
+        0.00E+00  0.00E+00
 ETA3
+        0.00E+00  0.00E+00  4.06E-01

 SIGMA - COV MATRIX FOR RANDOM EFFECTS - EPSILONS  ****
         EPS1      EPS2
 EPS1
+        2.24E-01
 EPS2
+        0.00E+00  1.50E-01

 OMEGA - CORR MATRIX FOR RANDOM EFFECTS - ETAS  *******
         ETA1      ETA2      ETA3
 ETA1
+        0.00E+00
 ETA2
+        0.00E+00  0.00E+00
 ETA3
+        0.00E+00  0.00E+00  6.37E-01

 SIGMA - CORR MATRIX FOR RANDOM EFFECTS - EPSILONS  ***
         EPS1      EPS2
 EPS1
+        4.73E-01
 EPS2
+        0.00E+00  3.87E-01

 ********************               FIRST ORDER CONDITIONAL ESTIMATION WITH INTERACTION              ********************
 ********************                            STANDARD ERROR OF ESTIMATE                          ********************

 THETA - VECTOR OF FIXED EFFECTS PARAMETERS   *********
         TH 1      TH 2      TH 3      TH 4      TH 5      TH 6      TH 7      TH 8      TH 9      TH10      TH11      TH12
          TH13
        ......... .........  9.26E-01  1.07E+01  5.08E-02 ......... .........  4.15E+00  5.40E+01  1.47E+00  2.10E+01  1.02E+01
          7.11E+01

 OMEGA - COV MATRIX FOR RANDOM EFFECTS - ETAS  ********
         ETA1      ETA2      ETA3
 ETA1
+       .........
 ETA2
+       ......... .........
 ETA3
+       ......... .........  1.78E-01

 SIGMA - COV MATRIX FOR RANDOM EFFECTS - EPSILONS  ****
         EPS1      EPS2
 EPS1
+        2.91E-02
 EPS2
+       .........  3.08E-02

 OMEGA - CORR MATRIX FOR RANDOM EFFECTS - ETAS  *******
         ETA1      ETA2      ETA3
 ETA1
+       .........
 ETA2
+       ......... .........
 ETA3
+       ......... .........  1.39E-01

 SIGMA - CORR MATRIX FOR RANDOM EFFECTS - EPSILONS  ***
         EPS1      EPS2
 EPS1
+        3.07E-02
 EPS2
+       .........  3.99E-02
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 Elapsed finaloutput time in seconds:     0.17
 #CPUT: Total CPU Time in Seconds,       72.878
