Mon May  6 23:50:41 PDT 2024
;; 1. Based on: runG50
;; 2. Description: G50 + inverse model with all caseum samples (no hockey stick), new S587 plasma model
;; x1. Author: aebustion
$PROBLEM    rabbit PK
$INPUT      ID RABBITID OLDID=DROP DOSEX DOSEFLAT NDOSES TIME TAD NGML
            NDV EVID MDV AMT II ADDL LESION METAB INFECT WT METHOD
            BIOPSY CMT TUBENO DIST INOUTRANK BLQ iF1 LESIONBIN
            SURFACEAREATOTAL SURFACEAREAUM2 DV
$DATA      TBAJ587_plasma_lesion_data_nm_restructure_logDV.csv
            IGNORE=@ IGNORE(LESION.EQ.0) IGNORE(LESION.EQ.1)
            IGNORE(LESION.EQ.2) IGNORE(LESION.EQ.3)
            IGNORE(TUBENO.EQ.-99) IGNORE(BLQ.EQ.1)

; uninvolved lung

; from the 300 mg study without DIST info

;IGNORE(METAB.EQ.1)
$SUBROUTINE ADVAN6 TOL=9
$MODEL      NCOMP=8 COMP=(ABS,DEFDOSE) COMP=(CENTRAL,DEFOBS)
            COMP=(PERIPH) COMP=(TRANSIT) COMP=(METAB)
            COMP=(METABPERIPH) COMP=(CASEUMPARENT) COMP=(CASEUMMETAB)
$PK

IF(METAB.EQ.0) L2 = 1
IF(METAB.EQ.1) L2 = 2

;IF(L2.EQ.1) CMT = 2
;IF(L2.EQ.2) CMT = 5

CL = THETA(3)
KM = THETA(6)

V  = THETA(4)

KA = THETA(5)
S2 = V
F1 = 1 * EXP(ETA(1))

ALAG1 = THETA(7)

Q = THETA(8)
V2 = THETA(9)

CLM = THETA(10)
VM = THETA(11)

QM = THETA(12)
VM2 = THETA(13)

;IF(DIST.EQ.-99) THEN ; cellular samples
;DISTN = 0
;ELSE
;DISTN = DIST
;ENDIF

IF(DIST.LE.10) THEN
DISTN = 10
ELSE
DISTN = DIST
ENDIF

DISTCOV = THETA(16)
DISTCOVGAMMA = THETA(20)
TVKPL7 = THETA(14)
KPL7 = TVKPL7

TVPC7 = exp(THETA(15))/DISTN**DISTCOVGAMMA
PC7 = TVPC7

DISTCOVMETAB = THETA(19)
DISTCOVMETABGAMMA = THETA(21)
TVKPL8 = THETA(17)
KPL8 = TVKPL8

TVPC8 = exp(THETA(18))/DISTN**DISTCOVMETABGAMMA
PC8 = TVPC8

$DES
DADT(1)=-KA*A(1)
DADT(2)= KA*A(4)- CL/V*A(2) - Q/V*A(2) + Q/V2*A(3)
DADT(3)= Q/V*A(2) - Q/V2*A(3)
DADT(4)= KA*A(1)-KA*A(4)

DADT(5)= CL/V*A(2)-CLM/VM*A(5) - QM/VM*A(5) + QM/VM2*A(6)
DADT(6)= QM/VM*A(5) - QM/VM2*A(6)

DADT(7)= KPL7 * (PC7 * A(2)/V - A(7))
DADT(8)= KPL8 * (PC8 * A(5)/VM - A(8))

$ERROR

CP = A(2)/V
CM = A(5)/VM

DEL = 1E-12
IPRED = LOG(A(7)+DEL)
IF(L2.EQ.2) IPRED = LOG(A(8)+DEL)

W = SQRT( (THETA(1)/EXP(IPRED))**2 + THETA(2))
IF(L2.EQ.2) W = SQRT( (THETA(6)/EXP(IPRED))**2 + THETA(7))
IF(W.EQ.0) W = 1

IRES = DV-IPRED
IWRES = IRES/W

;Y = IPRED + W*EPS(1) + EPS(2)
;IF(L2.EQ.2) Y = IPRED + W*EPS(3) + EPS(4)

Y = IPRED+W*EPS(1)
IF(L2.EQ.2) Y = IPRED+W*EPS(2)

$THETA  (0,0.421528) ; 1 prop Error
 (0,0.221896) ; 2 add Error
 (0,7.12) FIX ; 3 CL L/h
 (0,89.4) FIX ; 4 V L
 (0,0.283) FIX ; 5 KA 1/h
 (0,0.238709) ; 6 metab prop Error
 (0,0.631876) ; 7 metab add Error
 (0,13.5) FIX ; 8 Q
 (0,182) FIX ; 9 V2
 (0,12.8) FIX ; 10 CLM
 (0,38.9) FIX ; 11 VM
 (0,41.3) FIX ; 12 QM
 (0,353) FIX ; 13 VM2
 (0,0.00891594) ; 14 KPL7
 (0,12.2669) ; 15 PC7
 0 FIX ; 16 DISTCOV
 (0,0.0167351) ; 17 KPL8
 (0,12.8948) ; 18 PC8
 0 FIX ; 19 DISTCOV
 (0,1.86104) ; 20 DISTCOVGAMMA
 (0,1.89186) ; 21 DISTCOVMETABGAMMA
$OMEGA  0.40602384  FIX  ;    1 F IIV
$SIGMA  1  FIX  ;    1 error
 1  FIX  ;    2 error
$ESTIMATION METHOD=1 INTERACTION PRINT=5 NSIG=3 SIGL=9 MAXEVAL=9999
            NOABORT
$COVARIANCE UNCONDITIONAL
$TABLE      ID RABBITID BIOPSY TIME TAD IPRED PRED DV METAB LESION
            SURFACEAREATOTAL SURFACEAREAUM2 AMT DOSEX DIST WRES IWRES
            CWRES EVID F1 CL V KPL7 PC7 KPL8 PC8 INFECT WT
            FILE=sdtabD01 NOPRINT ONEHEADER

NM-TRAN MESSAGES
 WARNINGS AND ERRORS (IF ANY) FOR PROBLEM    1
 (WARNING  2) NM-TRAN INFERS THAT THE DATA ARE POPULATION.

1NONLINEAR MIXED EFFECTS MODEL PROGRAM (NONMEM) VERSION 7.5.0
 ORIGINALLY DEVELOPED BY STUART BEAL, LEWIS SHEINER, AND ALISON BOECKMANN
 CURRENT DEVELOPERS ARE ROBERT BAUER, ICON DEVELOPMENT SOLUTIONS,
 AND ALISON BOECKMANN. IMPLEMENTATION, EFFICIENCY, AND STANDARDIZATION
 PERFORMED BY NOUS INFOSYSTEMS.
 PROBLEM NO.:         1
 rabbit PK
 TOT. NO. OF OBS RECS:      114
 TOT. NO. OF INDIVIDUALS:       58
 GENERAL NONLINEAR KINETICS MODEL (DVERK1, ADVAN6)
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 #TBLN:      1
 #METH: First Order Conditional Estimation with Interaction
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
 #TERM:
0MINIMIZATION SUCCESSFUL
 NO. OF FUNCTION EVALUATIONS USED:      416
 NO. OF SIG. DIGITS IN FINAL EST.:  3.0

 ETABAR IS THE ARITHMETIC MEAN OF THE ETA-ESTIMATES,
 AND THE P-VALUE IS GIVEN FOR THE NULL HYPOTHESIS THAT THE TRUE MEAN IS 0.

 ETABAR:         1.5682E-02
 SE:             7.8142E-02
 N:                      58

 P VAL.:         8.4095E-01

 ETASHRINKSD(%)  5.7893E+00
 ETASHRINKVR(%)  1.1243E+01
 EBVSHRINKSD(%)  1.0460E+01
 EBVSHRINKVR(%)  1.9826E+01
 RELATIVEINF(%)  8.0174E+01
 EPSSHRINKSD(%)  1.5892E+01  1.4799E+01
 EPSSHRINKVR(%)  2.9258E+01  2.7407E+01


 TOTAL DATA POINTS NORMALLY DISTRIBUTED (N):          114
 N*LOG(2PI) CONSTANT TO OBJECTIVE FUNCTION:    209.51798557066536
 OBJECTIVE FUNCTION VALUE WITHOUT CONSTANT:    88.172629314612252
 OBJECTIVE FUNCTION VALUE WITH CONSTANT:       297.69061488527763
 REPORTED OBJECTIVE FUNCTION DOES NOT CONTAIN CONSTANT

 TOTAL EFFECTIVE ETAS (NIND*NETA):                            58


 #TERE:
 Elapsed estimation  time in seconds:   246.77
 Elapsed covariance  time in seconds:   335.21
 Elapsed postprocess time in seconds:     1.99

 ********************               FIRST ORDER CONDITIONAL ESTIMATION WITH INTERACTION              ********************
 #OBJT:**************                       MINIMUM VALUE OF OBJECTIVE FUNCTION                      ********************
 #OBJV:********************************************       88.173       **************************************************

 ********************               FIRST ORDER CONDITIONAL ESTIMATION WITH INTERACTION              ********************
 ********************                             FINAL PARAMETER ESTIMATE                           ********************

 THETA - VECTOR OF FIXED EFFECTS PARAMETERS   *********
         TH 1      TH 2      TH 3      TH 4      TH 5      TH 6      TH 7      TH 8      TH 9      TH10      TH11      TH12
          TH13      TH14      TH15      TH16      TH17      TH18      TH19      TH20      TH21
         2.44E-01  6.30E-02  7.12E+00  8.94E+01  2.83E-01  2.07E-01  5.86E-02  1.35E+01  1.82E+02  1.28E+01  3.89E+01  4.13E+01
          3.53E+02  6.01E-03  1.13E+01  0.00E+00  1.17E-02  1.30E+01  0.00E+00  1.64E+00  1.87E+00

 OMEGA - COV MATRIX FOR RANDOM EFFECTS - ETAS  ********
         ETA1
 ETA1
+        4.06E-01

 SIGMA - COV MATRIX FOR RANDOM EFFECTS - EPSILONS  ****
         EPS1      EPS2
 EPS1
+        1.00E+00
 EPS2
+        0.00E+00  1.00E+00

 OMEGA - CORR MATRIX FOR RANDOM EFFECTS - ETAS  *******
         ETA1
 ETA1
+        6.37E-01

 SIGMA - CORR MATRIX FOR RANDOM EFFECTS - EPSILONS  ***
         EPS1      EPS2
 EPS1
+        1.00E+00
 EPS2
+        0.00E+00  1.00E+00

 ********************               FIRST ORDER CONDITIONAL ESTIMATION WITH INTERACTION              ********************
 ********************                            STANDARD ERROR OF ESTIMATE                          ********************

 THETA - VECTOR OF FIXED EFFECTS PARAMETERS   *********
         TH 1      TH 2      TH 3      TH 4      TH 5      TH 6      TH 7      TH 8      TH 9      TH10      TH11      TH12
          TH13      TH14      TH15      TH16      TH17      TH18      TH19      TH20      TH21
         6.33E-02  4.72E-02 ......... ......... .........  4.96E-02  5.02E-02 ......... ......... ......... ......... .........
         .........  2.04E-03  7.16E-01 .........  3.16E-03  8.21E-01 .........  1.39E-01  1.54E-01

 OMEGA - COV MATRIX FOR RANDOM EFFECTS - ETAS  ********
         ETA1
 ETA1
+       .........

 SIGMA - COV MATRIX FOR RANDOM EFFECTS - EPSILONS  ****
         EPS1      EPS2
 EPS1
+       .........
 EPS2
+       ......... .........

 OMEGA - CORR MATRIX FOR RANDOM EFFECTS - ETAS  *******
         ETA1
 ETA1
+       .........

 SIGMA - CORR MATRIX FOR RANDOM EFFECTS - EPSILONS  ***
         EPS1      EPS2
 EPS1
+       .........
 EPS2
+       ......... .........
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 Elapsed finaloutput time in seconds:     0.01
 #CPUT: Total CPU Time in Seconds,      585.471
