Mon Aug  7 14:47:27 PDT 2023
;; 1. Based on: 121
$PROBLEM    rabbit plasma PK
$INPUT      ID OLDID=DROP WT DAT2=DROP TIME EVID DOSE_MGKG AMT TAD DV
            NGML CMPD STUDY=DROP CMT BLQ DV_ZERO
$DATA      all_TBAJ-876_plasma_studies_wCMT_BLQ_M3.csv IGNORE=@
            IGNORE(ID.LT.12) IGNORE(BLQ.EQ.1)
$SUBROUTINE ADVAN6 TOL=5
$MODEL      NCOMP=6 COMP=(ABS,DEFDOSE) COMP=(CENTRAL,DEFOBS)
            COMP=(PERIPH) COMP(CMPD) COMP(TRANSIT1) COMP(TRANSIT2)
$PK
CL = THETA(3)*EXP(ETA(1))
V  = THETA(4)*EXP(ETA(2))
KE = CL/V
KA = THETA(5)*EXP(ETA(3))
V2 = THETA(6)
Q = THETA(7)
K12 = Q/V
K21 = Q/V2
Fm = 1
S2=V
;Fm=THETA(13) ; fraction of drug metabolized

KM   = THETA(8)
VMAX = KM*CL

; M3 CL, CLm
TVCLm=THETA(9)
CLm=TVCLm*EXP(ETA(4))

; M3 V, Vm
TVVm=THETA(10)
Vm=TVVm*EXP(ETA(5))

;TRANSIT MODEL PARAMETER
MTT =THETA(13)*EXP(ETA(6))
N=2
KTR=N/MTT; transit rate constant

$DES
DADT(1)= -KTR*A(1)
;DADT(1)=-KA*A(1)
DADT(2)=A(6)*KA-(VMAX*A(2)/V)/(KM+A(2)/V)-A(2)*K12+A(3)*K21
DADT(3)=A(2)*K12-A(3)*K21
DADT(4) = Fm*(CL/V)*A(2) - (CLm/Vm)*A(4)
DADT(5)=KTR*A(1)-KTR*A(5)
DADT(6)=KTR*A(5)-KA*A(6)

$ERROR
CP = A(2)/V
CM = A(4)/Vm
IF(CMT.EQ.2) IPRED=A(2)/V
IF(CMT.EQ.4) IPRED=A(4)/Vm

PROPm=THETA(11) ; Prop metabolite
ADDm=THETA(12)  ; add metabolite
WA=THETA(2) ; additive error
WP=THETA(1) ; proportional error

IF(CMT.EQ.2) W = SQRT(WA**2+(WP*IPRED)**2)
IF(CMT.EQ.4) W = SQRT(ADDm**2+PROPm**2*IPRED**2)
IF(W.EQ.0) W = 1

IRES=DV-IPRED
IWRES=IRES/W
Y = IPRED + W*EPS(1)

$THETA  (0,0.520144) ; 1 Prop error
 (0,5E-05) FIX ; 2 Add error Error.
 (0,37.8745) ; 3 CL L/h
 (0,186.01) ; 4 V L
 (0,0.786354,65) ; 5 KA 1/h
 (0,1363) ; V2
 (0,42.1526) ; Q
 (0,0.186557) ; KM
 (0,60.2439) ; 6 CLm
 (0,593.81) ; 7 Vm
 (0,0.200932) ; PROPm
 0 FIX ; ADDm
 (0,1.27175) ; MTT
;(0,0.367475,1) ; Fm
$OMEGA  0.0929047  ;     CL IIV
 0  FIX  ;      V IIV
 0  FIX  ;     KA IIV
 0.125286  ;    CLm IIV
 0  FIX  ;     Vm IIV
 0  FIX
$SIGMA  1  FIX  ; eps residual variance
$ESTIMATION METHOD=1 INTERACTION PRINT=5 SIG=3 MAXEVAL=9999 NOABORT
$COVARIANCE UNCONDITIONAL
$TABLE      ID TIME IPRED PRED DV AMT WRES IWRES CWRES EVID TAD CMPD
            CP CM CMT NOPRINT ONEHEADER FILE=sdtab134
$TABLE      ID CL V KA KE CLm Vm NOPRINT ONEHEADER FILE=patab134
$TABLE      ID WT NOPRINT ONEHEADER FILE=cotab134

NM-TRAN MESSAGES
 WARNINGS AND ERRORS (IF ANY) FOR PROBLEM    1
 (WARNING  2) NM-TRAN INFERS THAT THE DATA ARE POPULATION.
 (WARNING  3) THERE MAY BE AN ERROR IN THE ABBREVIATED CODE. THE FOLLOWING
 ONE OR MORE RANDOM VARIABLES ARE DEFINED WITH "IF" STATEMENTS THAT DO NOT
 PROVIDE DEFINITIONS FOR BOTH THE "THEN" AND "ELSE" CASES. IF ALL
 CONDITIONS FAIL, THE VALUES OF THESE VARIABLES WILL BE ZERO.
   IPRED W

1NONLINEAR MIXED EFFECTS MODEL PROGRAM (NONMEM) VERSION 7.5.0
 ORIGINALLY DEVELOPED BY STUART BEAL, LEWIS SHEINER, AND ALISON BOECKMANN
 CURRENT DEVELOPERS ARE ROBERT BAUER, ICON DEVELOPMENT SOLUTIONS,
 AND ALISON BOECKMANN. IMPLEMENTATION, EFFICIENCY, AND STANDARDIZATION
 PERFORMED BY NOUS INFOSYSTEMS.
 PROBLEM NO.:         1
 rabbit plasma PK
 TOT. NO. OF OBS RECS:      391
 TOT. NO. OF INDIVIDUALS:       31
 GENERAL NONLINEAR KINETICS MODEL (DVERK1, ADVAN6)
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 #TBLN:      1
 #METH: First Order Conditional Estimation with Interaction
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
 #TERM:
0MINIMIZATION SUCCESSFUL
 NO. OF FUNCTION EVALUATIONS USED:      542
 NO. OF SIG. DIGITS IN FINAL EST.:  4.1

 ETABAR IS THE ARITHMETIC MEAN OF THE ETA-ESTIMATES,
 AND THE P-VALUE IS GIVEN FOR THE NULL HYPOTHESIS THAT THE TRUE MEAN IS 0.

 ETABAR:         5.5811E-03  0.0000E+00  0.0000E+00  7.0742E-04  0.0000E+00  0.0000E+00
 SE:             4.9407E-02  0.0000E+00  0.0000E+00  5.5843E-02  0.0000E+00  0.0000E+00
 N:                      31          31          31          31          31          31

 P VAL.:         9.1006E-01  1.0000E+00  1.0000E+00  9.8989E-01  1.0000E+00  1.0000E+00

 ETASHRINKSD(%)  6.4329E+00  0.0000E+00  0.0000E+00  1.0060E+01  0.0000E+00  0.0000E+00
 ETASHRINKVR(%)  1.2452E+01  0.0000E+00  0.0000E+00  1.9107E+01  0.0000E+00  0.0000E+00
 EBVSHRINKSD(%)  7.8731E+00  0.0000E+00  0.0000E+00  1.1232E+01  0.0000E+00  0.0000E+00
 EBVSHRINKVR(%)  1.5126E+01  0.0000E+00  0.0000E+00  2.1202E+01  0.0000E+00  0.0000E+00
 RELATIVEINF(%)  8.4861E+01  0.0000E+00  0.0000E+00  7.8786E+01  0.0000E+00  0.0000E+00
 EPSSHRINKSD(%)  5.1275E+00
 EPSSHRINKVR(%)  9.9921E+00


 TOTAL DATA POINTS NORMALLY DISTRIBUTED (N):          391
 N*LOG(2PI) CONSTANT TO OBJECTIVE FUNCTION:    718.60993296605398
 OBJECTIVE FUNCTION VALUE WITHOUT CONSTANT:   -2749.4523665143388
 OBJECTIVE FUNCTION VALUE WITH CONSTANT:      -2030.8424335482848
 REPORTED OBJECTIVE FUNCTION DOES NOT CONTAIN CONSTANT

 TOTAL EFFECTIVE ETAS (NIND*NETA):                            58


 #TERE:
 Elapsed estimation  time in seconds:   168.83
 Elapsed covariance  time in seconds:   234.90
 Elapsed postprocess time in seconds:     1.06

 ********************               FIRST ORDER CONDITIONAL ESTIMATION WITH INTERACTION              ********************
 #OBJT:**************                       MINIMUM VALUE OF OBJECTIVE FUNCTION                      ********************
 #OBJV:********************************************    -2749.452       **************************************************

 ********************               FIRST ORDER CONDITIONAL ESTIMATION WITH INTERACTION              ********************
 ********************                             FINAL PARAMETER ESTIMATE                           ********************

 THETA - VECTOR OF FIXED EFFECTS PARAMETERS   *********
         TH 1      TH 2      TH 3      TH 4      TH 5      TH 6      TH 7      TH 8      TH 9      TH10      TH11      TH12
          TH13
         5.15E-01  5.00E-05  3.73E+01  2.07E+02  1.39E+00  1.32E+03  4.04E+01  1.95E-01  6.03E+01  6.08E+02  2.01E-01  0.00E+00
          1.43E+00

 OMEGA - COV MATRIX FOR RANDOM EFFECTS - ETAS  ********
         ETA1      ETA2      ETA3      ETA4      ETA5      ETA6
 ETA1
+        8.93E-02
 ETA2
+        0.00E+00  0.00E+00
 ETA3
+        0.00E+00  0.00E+00  0.00E+00
 ETA4
+        0.00E+00  0.00E+00  0.00E+00  1.23E-01
 ETA5
+        0.00E+00  0.00E+00  0.00E+00  0.00E+00  0.00E+00
 ETA6
+        0.00E+00  0.00E+00  0.00E+00  0.00E+00  0.00E+00  0.00E+00

 SIGMA - COV MATRIX FOR RANDOM EFFECTS - EPSILONS  ****
         EPS1
 EPS1
+        1.00E+00

 OMEGA - CORR MATRIX FOR RANDOM EFFECTS - ETAS  *******
         ETA1      ETA2      ETA3      ETA4      ETA5      ETA6
 ETA1
+        2.99E-01
 ETA2
+        0.00E+00  0.00E+00
 ETA3
+        0.00E+00  0.00E+00  0.00E+00
 ETA4
+        0.00E+00  0.00E+00  0.00E+00  3.51E-01
 ETA5
+        0.00E+00  0.00E+00  0.00E+00  0.00E+00  0.00E+00
 ETA6
+        0.00E+00  0.00E+00  0.00E+00  0.00E+00  0.00E+00  0.00E+00

 SIGMA - CORR MATRIX FOR RANDOM EFFECTS - EPSILONS  ***
         EPS1
 EPS1
+        1.00E+00

 ********************               FIRST ORDER CONDITIONAL ESTIMATION WITH INTERACTION              ********************
 ********************                            STANDARD ERROR OF ESTIMATE                          ********************

 THETA - VECTOR OF FIXED EFFECTS PARAMETERS   *********
         TH 1      TH 2      TH 3      TH 4      TH 5      TH 6      TH 7      TH 8      TH 9      TH10      TH11      TH12
          TH13
         5.27E-02 .........  3.97E+00  3.83E+01  2.88E-01  2.95E+02  4.24E+00  7.68E-02  7.36E+00  7.53E+01  1.58E-02 .........
          1.47E-01

 OMEGA - COV MATRIX FOR RANDOM EFFECTS - ETAS  ********
         ETA1      ETA2      ETA3      ETA4      ETA5      ETA6
 ETA1
+        2.76E-02
 ETA2
+       ......... .........
 ETA3
+       ......... ......... .........
 ETA4
+       ......... ......... .........  3.38E-02
 ETA5
+       ......... ......... ......... ......... .........
 ETA6
+       ......... ......... ......... ......... ......... .........

 SIGMA - COV MATRIX FOR RANDOM EFFECTS - EPSILONS  ****
         EPS1
 EPS1
+       .........

 OMEGA - CORR MATRIX FOR RANDOM EFFECTS - ETAS  *******
         ETA1      ETA2      ETA3      ETA4      ETA5      ETA6
 ETA1
+        4.61E-02
 ETA2
+       ......... .........
 ETA3
+       ......... ......... .........
 ETA4
+       ......... ......... .........  4.81E-02
 ETA5
+       ......... ......... ......... ......... .........
 ETA6
+       ......... ......... ......... ......... ......... .........

 SIGMA - CORR MATRIX FOR RANDOM EFFECTS - EPSILONS  ***
         EPS1
 EPS1
+       .........
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 Elapsed finaloutput time in seconds:     0.05
 #CPUT: Total CPU Time in Seconds,      404.034
