Tue May  7 15:14:52 PDT 2024
;; 1. Based on: run59.mod (2023_04_19)
;; x1. Author: aebustion
$PROBLEM    rabbit lesion spatiotemporal modeling
$INPUT      ID OLDID=DROP WT DAT2=DROP TIME TAD EVID AMT DVN BLQ DIST
            CMPD DOSE_FACTOR iCL iCLm DV NDOSES HW
$DATA      TBAJ876_restructured_ids_distance.csv IGNORE=@
            IGNORE(CMPD.EQ.1) IGNORE(BLQ.EQ.1)
$SUBROUTINE ADVAN13 TOL=9
$MODEL      NCOMP=8 COMP=(ABS,DEFDOSE) COMP=(CENTRAL,DEFOBS)
            COMP=(PERIPH) COMP(CMPD) COMP(TRANSIT1) COMP(TRANSIT2)
            COMP=(PLESION) COMP=(MLESION)
$PK
IF(CMPD.EQ.1) L2 = 1
IF(CMPD.EQ.2) L2 = 2

TVCL = 37.26
CL=TVCL*EXP(ETA(1))
V  = THETA(3)
KE = CL/V
KA = THETA(4)
S2 = V
V2 = THETA(5)
Q = THETA(6)
K12 = Q/V
K21 = Q/V2
Fm = THETA(7)
KM   = THETA(8)
VMAX = KM*CL

TVCLm=60.29
CLm=TVCLm*EXP(ETA(2))
Vm=THETA(9)

MTT =THETA(10)
N=2
KTR=N/MTT; transit rate constant

; not sure if I need this following block yet...
; update: trouble with integration without it but how is 10 decided, and does NM consider '.' less than 10?
IF(DIST.LE.10) THEN
DISTN = 10
ELSE
DISTN = DIST
ENDIF

;DISTCOV = THETA(14)
DISTCOVGAMMA = THETA(11)
TVKPL6 = THETA(12)
KPL6 = TVKPL6
;IF(DISTN.LE.150) TVPC6 = DISTCOV
TVPC6 = EXP(THETA(13))/DISTN**DISTCOVGAMMA
PC6 = TVPC6

;DISTCOVM = THETA(18)
DISTCOVGAMMAM = THETA(14)
TVKPL7 = THETA(15)
KPL7 = TVKPL7
;IF(DISTN.LE.150) TVPC7 = DISTCOV
TVPC7 = EXP(THETA(16))/DISTN**DISTCOVGAMMAM
PC7 = TVPC7

$DES
DADT(1)= -KTR*A(1)
;DADT(1)=-KA*A(1)
DADT(2)=A(6)*KA-(VMAX*A(2)/V)/(KM+A(2)/V)-A(2)*K12+A(3)*K21
DADT(3)=A(2)*K12-A(3)*K21
DADT(4) = Fm*(CL/V)*A(2) - (CLm/Vm)*A(4)
DADT(5)=KTR*A(1)-KTR*A(5)
DADT(6)=KTR*A(5)-KA*A(6)
DADT(7)=KPL6 * (PC6*A(2)/V - A(7))  ; dCp,site/dt = KPL(PC * Cp,plasma - Csite)
DADT(8)=KPL7 * (PC7*A(4)/Vm - A(8))

$ERROR
CP=A(2)/V
CM=A(4)/Vm ; metabolite prediction

DEL = 1E-12
IPRED=LOG(A(7)+DEL) ; parent lesion
IF(L2.EQ.2) IPRED=LOG(A(8)+DEL) ; metabolite lesion

A6 = A(7)
A7 = A(8)

W = SQRT((THETA(1)/EXP(IPRED))**2 + THETA(2))
IF(L2.EQ.2) W = SQRT((THETA(17)/EXP(IPRED))**2 + THETA(18))
IF(W.EQ.0) W = 1

IRES=DV-IPRED
IWRES=IRES/W

;Y = IPRED + W*EPS(1) + EPS(2)
;IF(L2.EQ.2) Y = IPRED+W*EPS(3) + EPS(4)

;M3 method
LLOQ=LOG(1/1000)
IF(CMPD.EQ.2) LLOQ=LOG(10/1000)
DUM  = (LLOQ-IPRED)/W
CUMD = PHI(DUM)
IF (BLQ.EQ.0) THEN
  F_FLAG = 0
  Y = IPRED + W*ERR(1)
ENDIF

IF(BLQ.EQ.1) THEN
  F_FLAG = 1
  Y = CUMD
ENDIF

$THETA  (0,0.005) FIX ; 1 Prop error
 (0,2.25373) FIX ; 2 Add error Error.
 (0,207.2) FIX ; 3 V L
 (0,1.394) FIX ; 4 KA 1/h
 (0,1324) FIX ; 5 V2
 (0,40.43) FIX ; 6 Q
 (0,1) FIX ; 7 Fm
 (0,0.1949) FIX ; 8 KM
 (0,607.9) FIX ; 9 Vm
 (0,1.434) FIX ; 10 MTT
 (0,2.56575) FIX ; 11 DISTCOVGAMMA
 (0,0.468236,10) FIX ; 12 KPL6
 (0,15.7545) FIX ; 13 MAXPC
 (0,2.4225) ; 14 DISTCOVGAMMAM
 (0,0.399534,10) ; 15 KPL7
 (0,15.3478) ; 16 MAXPC7
 (0,0) FIX ; 17 prop error metabolite
 (0,1.21301) ; 17 additive error metabolite
$OMEGA  0.089401  FIX
 0.123201  FIX
$SIGMA  1  FIX
;$SIM (12345) (54321) ONLYSIM NSUB=500
$ESTIMATION METHOD=1 INTERACTION LAPLACIAN PRINT=1 NSIG=3 SIGL=9
            MAXEVAL=9999 NOABORT
$COVARIANCE UNCONDITIONAL
$TABLE      ID TIME TAD DIST CMPD DOSE_FACTOR IPRED PRED DV CP CM A6
            A7 iCL WT AMT WRES IWRES CWRES EVID PC6 PC7 NOPRINT
            ONEHEADER FILE=sdtabD87
;$TABLE      ID CL V KA V2 Q K12 K21 KPL6 PC6 KPL7 PC7 NOPRINT ONEHEADER

;            FILE=patabD37

NM-TRAN MESSAGES
 WARNINGS AND ERRORS (IF ANY) FOR PROBLEM    1
 (WARNING  2) NM-TRAN INFERS THAT THE DATA ARE POPULATION.
 (WARNING  3) THERE MAY BE AN ERROR IN THE ABBREVIATED CODE. THE FOLLOWING
 ONE OR MORE RANDOM VARIABLES ARE DEFINED WITH "IF" STATEMENTS THAT DO NOT
 PROVIDE DEFINITIONS FOR BOTH THE "THEN" AND "ELSE" CASES. IF ALL
 CONDITIONS FAIL, THE VALUES OF THESE VARIABLES WILL BE ZERO.
   Y
 (WARNING  87) WITH "LAPLACIAN" AND "INTERACTION", "NUMERICAL" AND "SLOW"
 ARE ALSO REQUIRED ON $ESTIM RECORD, AND "SLOW" IS REQUIRED ON $COV
 RECORD. NM-TRAN HAS SUPPLIED THESE OPTIONS.

1NONLINEAR MIXED EFFECTS MODEL PROGRAM (NONMEM) VERSION 7.5.0
 ORIGINALLY DEVELOPED BY STUART BEAL, LEWIS SHEINER, AND ALISON BOECKMANN
 CURRENT DEVELOPERS ARE ROBERT BAUER, ICON DEVELOPMENT SOLUTIONS,
 AND ALISON BOECKMANN. IMPLEMENTATION, EFFICIENCY, AND STANDARDIZATION
 PERFORMED BY NOUS INFOSYSTEMS.
 PROBLEM NO.:         1
 rabbit lesion spatiotemporal modeling
 TOT. NO. OF OBS RECS:       82
 TOT. NO. OF INDIVIDUALS:       96
 GENERAL NONLINEAR KINETICS MODEL WITH STIFF/NONSTIFF EQUATIONS (LSODA, ADVAN13)
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 #TBLN:      1
 #METH: Laplacian Conditional Estimation with Interaction
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
 #TERM:
0MINIMIZATION SUCCESSFUL
 HOWEVER, PROBLEMS OCCURRED WITH THE MINIMIZATION.
 REGARD THE RESULTS OF THE ESTIMATION STEP CAREFULLY, AND ACCEPT THEM ONLY
 AFTER CHECKING THAT THE COVARIANCE STEP PRODUCES REASONABLE OUTPUT.
 NO. OF FUNCTION EVALUATIONS USED:      229
 NO. OF SIG. DIGITS IN FINAL EST.:  3.6

 ETABAR IS THE ARITHMETIC MEAN OF THE ETA-ESTIMATES,
 AND THE P-VALUE IS GIVEN FOR THE NULL HYPOTHESIS THAT THE TRUE MEAN IS 0.

 ETABAR:        -6.7330E-03  4.0788E-03
 SE:             4.8482E-03  1.7020E-02
 N:                      82          82

 P VAL.:         1.6490E-01  8.1060E-01

 ETASHRINKSD(%)  8.5227E+01  5.5820E+01
 ETASHRINKVR(%)  9.7817E+01  8.0481E+01
 EBVSHRINKSD(%)  9.6964E+01  5.6253E+01
 EBVSHRINKVR(%)  9.9908E+01  8.0862E+01
 RELATIVEINF(%)  1.0000E-10  1.0000E-10
 EPSSHRINKSD(%)  1.0656E+01
 EPSSHRINKVR(%)  2.0176E+01


 TOTAL DATA POINTS NORMALLY DISTRIBUTED (N):           82
 N*LOG(2PI) CONSTANT TO OBJECTIVE FUNCTION:    150.70591944556631
 OBJECTIVE FUNCTION VALUE WITHOUT CONSTANT:    72.970702042995555
 OBJECTIVE FUNCTION VALUE WITH CONSTANT:       223.67662148856186
 REPORTED OBJECTIVE FUNCTION DOES NOT CONTAIN CONSTANT

 TOTAL EFFECTIVE ETAS (NIND*NETA):                           164


 #TERE:
 Elapsed estimation  time in seconds:  1011.10
 Elapsed covariance  time in seconds:   175.67
 Elapsed postprocess time in seconds:     4.89

 ********************                LAPLACIAN CONDITIONAL ESTIMATION WITH INTERACTION               ********************
 #OBJT:**************                       MINIMUM VALUE OF OBJECTIVE FUNCTION                      ********************
 #OBJV:********************************************       72.971       **************************************************

 ********************                LAPLACIAN CONDITIONAL ESTIMATION WITH INTERACTION               ********************
 ********************                             FINAL PARAMETER ESTIMATE                           ********************

 THETA - VECTOR OF FIXED EFFECTS PARAMETERS   *********
         TH 1      TH 2      TH 3      TH 4      TH 5      TH 6      TH 7      TH 8      TH 9      TH10      TH11      TH12
          TH13      TH14      TH15      TH16      TH17      TH18
         5.00E-03  2.25E+00  2.07E+02  1.39E+00  1.32E+03  4.04E+01  1.00E+00  1.95E-01  6.08E+02  1.43E+00  2.57E+00  4.68E-01
          1.58E+01  2.18E+00  3.49E-01  1.41E+01  0.00E+00  7.10E-01

 OMEGA - COV MATRIX FOR RANDOM EFFECTS - ETAS  ********
         ETA1      ETA2
 ETA1
+        8.94E-02
 ETA2
+        0.00E+00  1.23E-01

 SIGMA - COV MATRIX FOR RANDOM EFFECTS - EPSILONS  ****
         EPS1
 EPS1
+        1.00E+00

 OMEGA - CORR MATRIX FOR RANDOM EFFECTS - ETAS  *******
         ETA1      ETA2
 ETA1
+        2.99E-01
 ETA2
+        0.00E+00  3.51E-01

 SIGMA - CORR MATRIX FOR RANDOM EFFECTS - EPSILONS  ***
         EPS1
 EPS1
+        1.00E+00

 ********************                LAPLACIAN CONDITIONAL ESTIMATION WITH INTERACTION               ********************
 ********************                            STANDARD ERROR OF ESTIMATE                          ********************

 THETA - VECTOR OF FIXED EFFECTS PARAMETERS   *********
         TH 1      TH 2      TH 3      TH 4      TH 5      TH 6      TH 7      TH 8      TH 9      TH10      TH11      TH12
          TH13      TH14      TH15      TH16      TH17      TH18
        ......... ......... ......... ......... ......... ......... ......... ......... ......... ......... ......... .........
         .........  2.44E-01  2.47E-02  1.22E+00 .........  1.98E-01

 OMEGA - COV MATRIX FOR RANDOM EFFECTS - ETAS  ********
         ETA1      ETA2
 ETA1
+       .........
 ETA2
+       ......... .........

 SIGMA - COV MATRIX FOR RANDOM EFFECTS - EPSILONS  ****
         EPS1
 EPS1
+       .........

 OMEGA - CORR MATRIX FOR RANDOM EFFECTS - ETAS  *******
         ETA1      ETA2
 ETA1
+       .........
 ETA2
+       ......... .........

 SIGMA - CORR MATRIX FOR RANDOM EFFECTS - EPSILONS  ***
         EPS1
 EPS1
+       .........
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 Elapsed finaloutput time in seconds:     0.05
 #CPUT: Total CPU Time in Seconds,     1194.766
